# Вариант 3
# Задание №1
3*3/4 - 4/5 = 1.45
# Задание №2
((3*1/3 + 2.5)/(2.5 - 1/3)*(4.6 - 2*1/3)/(4.6 + 2*1/3)*5.2)/(0.05/(1/7 - 0.125) + 5.7) = 0.738049
# Задание №3
x := 3.251
y := 3.325
z := 0.466
(sin(z) + cos(2*x))/(2*x^5 + tan(x)) + nthroot(3*x + 2*y, 3) = 2.54279
# Задание №4
x := 5, 5.9 .. 7
y := -7, -8.6 .. -13
z := 7 .. 12
x^2 - 10*x + 2 = [-23; -22.19; -19.76]
# Задание №5
x := 2.9
f(x) := 5*x/(x^2 + 3)
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# Задание №6
